*Heading
** Job name: refinedmesh Model name: Model-1
** Generated by: Abaqus/CAE 2018
*Preprint, echo=NO, model=NO, history=NO, contact=NO
**
** PARTS
**
*Part, name=P_INDENTER
*Node
      1,  0.100000001,  0.285802066
      2, 1.68547631e-05,  0.250002921
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*Element, type=RAX2
  1,   2,   4
  2,   4,   5
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*Node
    107, -9.18485116e-21,         0.25,           0.
*Nset, nset=RP_INDENTER
107,
*Nset, nset=Set-1
 106,
*Elset, elset=_Master_SNEG, internal, generate
   1,  105,    1
*Surface, type=ELEMENT, name=Master
_Master_SNEG, SNEG
*Elset, elset=E_INDENTER, generate
   1,  105,    1
*END Part
**
*Part, name=Substrate
*Node
      1,         0.25,  0.209999993
      2, 0.0399999991,  0.209999993
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*Element, type=CAX4I
  1,    1,   17,  709,  128
  2,   17,   18,  710,  709
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*Element, type=CAX3
4091, 4948, 4947, 4637
4092, 4927, 4863, 4907
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*Nset, nset=PSet3, internal, generate
    1,  8015,     1
*Elset, elset=PSet3, internal, generate
    1,  7879,     1
*Elset, elset=_Slave_S3, internal
 4510, 4511, 4512, 4513, 4521, 4536
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*Elset, elset=_Slave_S1, internal
 4517, 4518, 4540, 4541, 4542, 4559
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*Elset, elset=_Slave_S4, internal
 4600, 6441, 6528, 6529, 6530, 6531, 6532, 6540, 6541, 6542, 6543, 6546, 6547, 6599, 6616
*Elset, elset=_Slave_S2, internal
  898,  955, 1012, 1069, 1126, 1183
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*Surface, type=ELEMENT, name=Slave
_Slave_S3, S3
_Slave_S1, S1
_Slave_S4, S4
_Slave_S2, S2
** Section: Substrate
*Solid Section, elset=PSet3, material=AISI_1020
,
*End Part
**
**
** ASSEMBLY
**
*ASSEMBLY, name=ASSEMBLY
*INSTANCE, name=I_INDENTER, part=P_INDENTER
*END INSTANCE
*INSTANCE, name=Substrate1, part=Substrate
*END INSTANCE
**
*Nset, nset=PSet6, internal, instance=Substrate1
   7,   8,  10,  11, 241, 242
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*Elset, elset=PSet6, internal, instance=Substrate1
 4034, 4035, 4036, 4037, 4038, 4039
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*Nset, nset=PSet7, internal, instance=Substrate1
   3,   4,  11,  12,  73,  74
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*Elset, elset=PSet7, internal, instance=Substrate1
  813,  814,  815,  816,  817,  818
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*Nset, nset=PSet8, internal, instance=I_INDENTER
 107,
*Nset, nset=PSet9, internal, instance=I_INDENTER
 107,
 *Nset, nset=RP_INDENTER
107,
*Rigid Body, ref node=I_INDENTER.RP_INDENTER, elset=I_INDENTER.E_INDENTER
*END ASSEMBLY
**
** MATERIALS
**
*Material, name=AISI_1020
*Elastic
*Plastic
**
** INTERACTION PROPERTIES
**
*Surface Interaction, name=Frictionless_Contact
1.,
*Friction
0.,
**
** BOUNDARY CONDITIONS
**
** Name: Bottom_Lock Type: Symmetry/Antisymmetry/Encastre
*Boundary
PSet7, ENCASTRE
** Name: Y-Symmetry Type: Symmetry/Antisymmetry/Encastre
*Boundary
PSet6, YASYMM
**
** INTERACTIONS
**
** Interaction: Indentor_Contact
*Contact Pair, interaction=Frictionless_Contact, type=SURFACE TO SURFACE
Substrate1.Slave, I_INDENTER.Master
** ----------------------------------------------------------------
**
** STEP: Indentation
**
*Step, name=Indentation, nlgeom=YES, inc=10000
*Static
1e-06, 30., 1e-30, 0.25
**
** BOUNDARY CONDITIONS
**
** Name: Indentation Type: Displacement/Rotation
*Boundary
PSet8, 1, 1
PSet8, 2, 2, -0.0025
PSet8, 6, 6
**
** OUTPUT REQUESTS
**
*Restart, write, frequency=0
**
** FIELD OUTPUT: F-Output-1
**
*Output, field, variable=PRESELECT
**
** HISTORY OUTPUT: H-Output-1
**
*Output, history, variable=PRESELECT
*NODE OUTPUT, NSET=I_INDENTER.RP_INDENTER
U2
*NODE OUTPUT, NSET=I_INDENTER.RP_INDENTER
RF2
*End Step
** ----------------------------------------------------------------
**
** STEP: Recession
**
*Step, name=Recession, nlgeom=YES, inc=10000
*Static
1e-06, 30., 1e-30, 0.25
**
** BOUNDARY CONDITIONS
**
** Name: Bottom_Lock Type: Symmetry/Antisymmetry/Encastre
*Boundary, op=NEW
PSet7, ENCASTRE
** Name: Indentation Type: Displacement/Rotation
*Boundary, op=NEW
** Name: Recession Type: Displacement/Rotation
*Boundary, op=NEW
PSet9, 1, 1
PSet9, 2, 2
PSet9, 6, 6
** Name: Y-Symmetry Type: Symmetry/Antisymmetry/Encastre
*Boundary, op=NEW
PSet6, YASYMM
**
** OUTPUT REQUESTS
**
*Restart, write, frequency=0
**
** FIELD OUTPUT: F-Output-1
**
*Output, field, variable=PRESELECT
**
** HISTORY OUTPUT: H-Output-1
**
*Output, history, variable=PRESELECT
*NODE OUTPUT, NSET=I_INDENTER.RP_INDENTER
U2
*NODE OUTPUT, NSET=I_INDENTER.RP_INDENTER
RF2
*End Step
